E := 4
T := 5*10^-5
f := 1/T
t := 0, T/1000 .. 2*T
Ω := 2*π/T
N := 20
s(t) := if(0 ≤ t ≤ T, 2*E*t/T - E, 0)
sp(t) := sum(s(t - k*T), k = 0 .. 2)
n := 20
n := n
E := E
a0 := (1/T)*integral(2*E*t/T - E, t = 0 .. T) simplify → 0
a[n] := 2/T*integral((2*E*t/T - E)*cos(n*Ω*t), t = 0 .. T) simplify → (2*E*(cos(π*n)^2 - 1) + π*E*n*sin(2*π*n))/(π^2*n^2)
b[n] := 2/T*integral((2*E*t/T - E)*sin(n*Ω*t), t = 0 .. T) simplify → (2*π*E*n*sin(π*n)^2 + E*sin(2*π*n) - 2*π*E*n)/(π^2*n^2)
a[n] := 0
n := 1 .. N
b[n] := -2*E/(n*π)
M := 10000
m := 1 .. M
c[m] := -2*E/(m*π)
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E := 4
Cx[m] := sqrt(c[m]^2)
Ax[n] := sqrt(b[n]^2)
Cx[1] = 2.54648
Ax[0] = 0
Cx[0] = 0
Ax[1] = 2.54648
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ψx[n] := -π/2
ψx[m] := -π/2
N := 20
sv(t) := Ax[0] + sum(Ax[n]*cos(2*π*f*n*t - ψx[n]), n = 1 .. 20)
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Cv(t) := Ax[0] + sum(Cx[m]*cos(2*π*f*m*t - ψx[m]), m = 1 .. M)
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δ := sqrt(integral((sp(t) - sv(t))^2, t = 0 .. T)/integral(sp(t)^2, t = 0 .. T))
δ = 0.172188
δ := sqrt(integral((sp(t) - Cv(t))^2, t = 0 .. T)/integral(sp(t)^2, t = 0 .. T))
δ = 0.000779261
u := 1
ω[u] := 2*π*(1/(5*10^-5))*100
ω[u] = 12566371  # рад /с
Given
U11*(g1 + g4) == J
-U11*g1 - U33*(p*C1 + g2) - U44*g3 == 0
-U11*g4 - U33*g5 - U77*g7 == 0
-U44*(p*C2) - U77*g6 == 0
Find(U11, U33, U44, U77) → [
    J/(g1 + g4);
    -(J*g3*g4*g6 + C2*J*g1*g7*p)/(g1*g3*g5*g6 + g3*g4*g5*g6 + C1*C2*g1*g7*p^2 + C1*C2*g4*g7*p^2 + C2*g1*g2*g7*p + C2*g2*g4*g7*p);
    (J*g2*g4*g6 - J*g1*g5*g6 + C1*J*g4*g6*p)/(g1*g3*g5*g6 + g3*g4*g5*g6 + C1*C2*g1*g7*p^2 + C1*C2*g4*g7*p^2 + C2*g1*g2*g7*p + C2*g2*g4*g7*p);
    -(C1*C2*J*g4*p^2 - C2*J*g1*g5*p + C2*J*g2*g4*p)/(g1*g3*g5*g6 + g3*g4*g5*g6 + C1*C2*g1*g7*p^2 + C1*C2*g4*g7*p^2 + C2*g1*g2*g7*p + C2*g2*g4*g7*p)
]
U11 == J/(g1 + g4)
U77 == (C1*C2*J*g4*p^2 - C2*J*g1*g5*p + C2*J*g2*g4*p)/(g1*g3*g5*g6 + g3*g4*g5*g6 + C1*C2*g1*g7*p^2 + C1*C2*g4*g7*p^2 + C2*g1*g2*g7*p + C2*g2*g4*g7*p)
U11 := J/(g1 + g4)  # error: Эта переменная не определена.
U77 := (C1*C2*J*g4*p^2 - C2*J*g1*g5*p + C2*J*g2*g4*p)/(g1*g3*g5*g6 + g3*g4*g5*g6 + C1*C2*g1*g7*p^2 + C1*C2*g4*g7*p^2 + C2*g1*g2*g7*p + C2*g2*g4*g7*p)  # error: Эта переменная не определена.
K(p) := U77/U11  # error: Эта переменная не определена.
K(p) simplify → C2*p*(g2*g4 - g1*g5 + C1*g4*p)/(C1*C2*g7*p^2 + C2*g2*g7*p + g3*g5*g6)
K(p) := C2*p*(g2*g4 - g1*g5 + C1*g4*p)/(C1*C2*g7*p^2 + C2*g2*g7*p + g3*g5*g6)  # error: Эта переменная не определена.
g1 := 1/(5.6*10^3)
g2 := 1/(11*10^3)
g3 := 1/(16*10^3)
g4 := 1/(8*10^3)
g5 := 1/(16*10^3)
g6 := 1/(16*10^3)
g7 := 1/(16*10^3)
C1 := 0.17*10^-9
C2 := 0.17*10^-9
a := g3*g5*g6
c := C1*C2*g7
b := C2*g2*g7
q(u) := c*u^2 + b*u + a
Given
v := q(u) coeffs → 1/4095983794768
c*u^2 + b*u + a == 0
Find(u) simplify → [-2.674*10^5 - 2.523i*10^5, -2.674*10^5 + 2.523i*10^5]
ωmax := 2*sqrt((2.674*10^5)^2 + (2.523*10^5)^2) = 735277
ωmin := 0
ω := 0, 10 .. 10^6
K(p) := C2*p*(g2*g4 - g1*g5 + C1*g4*p)/(C1*C2*g7*p^2 + C2*g2*g7*p + g3*g5*g6)
K(ω) := C2*1i*ω*(g2*g4 - g1*g5 + C1*g4*1*1i*ω)/(-C1*C2*g7*ω^2 + C2*g2*g7*ω + g3*g5*g6)
Km(ω) := |K(ω)|
ψk(ω) := arg(K(ω))
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