E := 10
T := 2*10^-5
N := 20
f := 1/T
Ω := 2*π/T
t := 0, T/1000 .. 2*T
a0 := 0
s(t) :=
    -2.*E*t/T + E if 0 ≤ t ≤ T
    2*E*t/T + E if T < t ≤ 2*T
sp(t) :=
    s(t) if 0 ≤ t ≤ T
    s(t - T) if T < t ≤ 2*T
n := 1 .. N
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A0 := 1/T*integral(-2.*E*t/T + E, t = 0 .. T)
a0 := 1/T*integral(s(t), t = 0 .. T)
a0 := A0
a0 = -3.09034e-16
E := E
a0 → 2.31111593326e-28
A[n] := 2/T*integral((-2*E*t/T + E)*cos(n*Ω*t), t = 0 .. T) simplify → (2*E*sin(π*n)^2 - π*E*n*sin(2*π*n))/(π^2*n^2)
a[n] := 2/T*integral(s(t)*cos(n*Ω*t), t = 0 .. T)
a[n] := (2*E*sin(π*n)^2 - π*E*n*sin(2*π*n))/(π^2*n^2)
a[n] := 0
B[n] := 2/T*integral((-2*E*t/T + E)*sin(n*Ω*t), t = 0 .. T) simplify → -(E*sin(2*π*n) + 2*π*E*n*(sin(π*n)^2 - 1))/(π^2*n^2)
b[n] := 2/T*integral(s(t)*sin(n*Ω*t), t = 0 .. T)
b[n] := -(E*sin(2*π*n) + 2*π*E*n*(sin(π*n)^2 - 1))/(π^2*n^2)
b[n] := -2*E*(sin(π*n)^2 - 1)/(π*n)
n := 0 .. N
E := 10
a[n] := 10^-15
Ax[n] := |b[n]|
ψx[n] := atan(b[n]/a[n])
Ax[1] = 6.3662
ψx[1] = 1.5708
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N := 19
sv(t) := Ax[0] + sum(Ax[n]*cos(2*π*f*n*t - ψx[n]), n = 1 .. N)
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δ := sqrt(integral((sp(t) - sv(t))^2, t = 0 .. T)/integral(sp(t)^2, t = 0 .. T))
δ = 0.176547
Given
U11*(g1 + g5) == J
-U11*g1 - U55*g3 - U33*p*C1 == 0
U44*(g2 + p*C2) - U33*g2 - U66*p*C2 == 0
-U11*g5 - U66*g4 == 0
U44*g3 - U55*g3 == 0
Find(U11, U33, U44, U55, U66) → [
    J/(g1 + g5);
    -(J*g1*g2*g4 + C2*J*g1*g4*p - C2*J*g3*g5*p)/(g1*g2*g3*g4 + g2*g3*g4*g5 + C1*C2*g1*g4*p^2 + C1*C2*g4*g5*p^2 + C1*g1*g2*g4*p + C1*g2*g4*g5*p);
    -(C1*C2*J*g5*p^2 + J*g1*g2*g4)/(g1*g2*g3*g4 + g2*g3*g4*g5 + C1*C2*g1*g4*p^2 + C1*C2*g4*g5*p^2 + C1*g1*g2*g4*p + C1*g2*g4*g5*p);
    -(C1*C2*J*g5*p^2 + J*g1*g2*g4)/(g1*g2*g3*g4 + g2*g3*g4*g5 + C1*C2*g1*g4*p^2 + C1*C2*g4*g5*p^2 + C1*g1*g2*g4*p + C1*g2*g4*g5*p);
    -J*g5/(g1*g4 + g4*g5)
]
U11 := J/(g1 + g5)  # error: Эта переменная не определена.
U55 := (C1*C2*J*g5*p^2 + J*g1*g2*g4)/(g1*g2*g3*g4 + g2*g3*g4*g5 + C1*C2*g1*g4*p^2 + C1*C2*g4*g5*p^2 + C1*g1*g2*g4*p + C1*g2*g4*g5*p)  # error: Эта переменная не определена.
K(p) := U55/U11  # error: Эта переменная не определена.
K(p) simplify → (C1*C2*g5*p^2 + g1*g2*g4)/(g4*(C1*C2*p^2 + C1*g2*p + g2*g3))
K(p) := (C1*C2*g5*p^2 + g1*g2*g4)/(g4*(C1*C2*p^2 + C1*g2*p + g2*g3))  # error: Эта переменная не определена.
K(1j*ω) → (g1*g2*g4 - C1*C2*ω^2*g5)/(g4*(g2*g3 - C1*C2*ω^2 + C1*g2*ω*1i))
g1 := 1/(2.7*10^3)
g2 := 1/(10*10^3)
g3 := 1/(5.4*10^3)
g4 := 1/(0.57*10^3)
g5 := 1/(6.4*10^3)
C1 := 0.5*10^-9
C2 := 0.5*10^-9
a := g2*g3*g4
b := g2*g4*C1
c := C1*C2*g4
a = 3.24886e-11
b = 8.77193e-17
c = 4.38596e-22
q(u) := c*u^2 + b*u + a
v := q(u) coeffs, u → [0.00000000003248863; 8.77192982456*10^-17; 4.38596491228*10^-22]
r := polyroots(v)
r = [-100000 + 253129i; -100000 - 253129i]
transpose(r) = [-100000 + 253129i, -100000 - 253129i]
ωmin := 0
ωmax := 2*sqrt((1*10^5)^2 + (2.531*10^5)^2) = 544278
K(p) := (C1*C2*g5*p^2 + g1*g2*g4)/(g4*(C1*C2*p^2 + C1*g2*p + g2*g3))
K(ω) := (g1*g2*g4 - C1*C2*ω^2*g5)/(g4*(g2*g3 - C1*C2*ω^2 + C1*g2*ω*1i))
Km(ω) := |K(ω)|
ψk(ω) := arg(K(ω))
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