E := 10
T := 2*10^-5
N := 20
f := 1/T
Ω := 2*π/T
a0 := 0
t := 0, T/1000 .. 2*T
s(t) :=
    -4*E*t/T if 0 ≤ t ≤ T/4
    4*E*t/T - 2*E if T/4 < t ≤ 3*T/4
    4*E - 4*E*t/T if 3*T/4 < t ≤ T
sp(t) :=
    s(t) if 0 ≤ t ≤ T
    s(t - T) if T < t ≤ 2*T
n := 1 .. N
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A0 := 1/T*integral(-4*E*t/T, t = 0 .. T/4) + 1/T*integral(4*E*t/T - 2*E, t = T/4 .. 3*T/4) + 1/T*integral(4*E - 4*E*t/T, t = 3*T/4 .. T)
a0 := 1/T*integral(s(t), t = 0 .. T)
a0 := A0
a0 := 0
E := E
a0 → 0
A[n] := 2/T*integral(-4*E*t*cos(n*Ω*t)/T, t = 0 .. T/4) + 2/T*integral((4*E*t/T - 2*E)*cos(n*Ω*t), t = T/4 .. 3*T/4) + 2/T*integral((4*E - 4*E*t/T)*cos(n*Ω*t), t = 3*T/4 .. T) simplify → (4*E*sin(π*n)^2 + 8*E*sin(π*n/4)^2 - 8*E*sin(3*π*n/4)^2)/(π^2*n^2)
a[n] := 2/T*integral(s(t)*cos(n*Ω*t), t = 0 .. T)
a[n] := (4*E*sin(π*n)^2 + 8*E*sin(π*n/4)^2 - 8*E*sin(3*π*n/4)^2)/(π^2*n^2)
a[n] := 0
B[n] := 2/T*integral(-4*E*t*sin(n*Ω*t)/T, t = 0 .. T/4) + 2/T*integral((4*E*t/T - 2*E)*sin(n*Ω*t), t = T/4 .. 3*T/4) + 2/T*integral((4*E - 4*E*t/T)*sin(n*Ω*t), t = 3*T/4 .. T) simplify → -(2*E*sin(2*π*n) + 4*E*sin(π*n/2) - 4*E*sin(3*π*n/2))/(π^2*n^2)
b[n] := 2/T*integral(s(t)*sin(n*Ω*t), t = 0 .. T)
b[n] := (2*E*sin(2*π*n) + 4*E*sin(π*n/2) - 4*E*sin(3*π*n/2))/(π^2*n^2)
b[n] := 4*E*(sin(3*π*n/2) - sin(π*n/2))/(π^2*n^2)
n := 0 .. N
E := 10
a[n] := 10^-15
Ax[n] := |b[n]|
ψx[n] := atan(b[n]/a[n])
Ax[1] = 8.10569
ψx[1] = -1.5708
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N := 19
sv(t) := Ax[0] + sum(Ax[n]*cos(2*π*f*n*t - ψx[n]), n = 1 .. N)
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δ := sqrt(integral((sp(t) - sv(t))^2, t = 0 .. T)/integral(sp(t)^2, t = 0 .. T))
δ = 0.00451974
Given
U11*(g1 + g5) == J
-U11*g1 - U88*g3 - U33*p*C1 == 0
U44*(g2 + p*C2) - U33*g2 - U66*p*C2 == 0
-U11*g5 - U66*g4 == 0
U44*(g7 + g6) - U88*g7 == 0
Find(U11, U33, U44, U66, U88) → [
    J/(g1 + g5);
    -(J*g1*g2*g4*g7 + C2*J*g1*g4*g7*p - C2*J*g3*g5*g6*p - C2*J*g3*g5*g7*p)/(g1*g2*g3*g4*g6 + g1*g2*g3*g4*g7 + g2*g3*g4*g5*g6 + g2*g3*g4*g5*g7 + C1*g1*g2*g4*g7*p + C1*g2*g4*g5*g7*p + C1*C2*g1*g4*g7*p^2 + C1*C2*g4*g5*g7*p^2);
    -(C1*C2*J*g5*g7*p^2 + J*g1*g2*g4*g7)/(g1*g2*g3*g4*g6 + g1*g2*g3*g4*g7 + g2*g3*g4*g5*g6 + g2*g3*g4*g5*g7 + C1*g1*g2*g4*g7*p + C1*g2*g4*g5*g7*p + C1*C2*g1*g4*g7*p^2 + C1*C2*g4*g5*g7*p^2);
    -J*g5/(g1*g4 + g4*g5);
    -(J*g1*g2*g4*g6 + J*g1*g2*g4*g7 + C1*C2*J*g5*g6*p^2 + C1*C2*J*g5*g7*p^2)/(g1*g2*g3*g4*g6 + g1*g2*g3*g4*g7 + g2*g3*g4*g5*g6 + g2*g3*g4*g5*g7 + C1*g1*g2*g4*g7*p + C1*g2*g4*g5*g7*p + C1*C2*g1*g4*g7*p^2 + C1*C2*g4*g5*g7*p^2)
]
U11 := J/(g1 + g5)  # error: Эта переменная не определена.
U88 := (J*g1*g2*g4*g6 + J*g1*g2*g4*g7 + C1*C2*J*g5*g6*p^2 + C1*C2*J*g5*g7*p^2)/(g1*g2*g3*g4*g6 + g1*g2*g3*g4*g7 + g2*g3*g4*g5*g6 + g2*g3*g4*g5*g7 + C1*g1*g2*g4*g7*p + C1*g2*g4*g5*g7*p + C1*C2*g1*g4*g7*p^2 + C1*C2*g4*g5*g7*p^2)  # error: Эта переменная не определена.
K(p) := U88/U11  # error: Эта переменная не определена.
K(p) simplify → (g6 + g7)*(C1*C2*g5*p^2 + g1*g2*g4)/(g4*(C1*C2*g7*p^2 + C1*g2*g7*p + g2*g3*g6 + g2*g3*g7))
K(p) := (g6 + g7)*(C1*C2*g5*p^2 + g1*g2*g4)/(g4*(C1*C2*g7*p^2 + C1*g2*g7*p + g2*g3*g6 + g2*g3*g7))  # error: Эта переменная не определена.
K(1j*ω) → (g6 + g7)*(g1*g2*g4 - C1*C2*ω^2*g5)/(g4*(g2*g3*g6 - C1*C2*g7*ω^2 + g2*g3*g7 + C1*g2*g7*ω*1i))
g1 := 1/(220*10^3)
g2 := 1/(18*10^3)
g3 := 1/(20*10^3)
g4 := 1/(16*10^3)
g5 := 1/(16*10^3)
g6 := 1/(36*10^3)
g7 := 1/(36*10^3)
C1 := 10^-10
C2 := 10^-10
a := g2*g3*g6 + g2*g3*g7
b := C1*g2*g7
c := C1*C2*g7
q(u) := c*u^2 + b*u + a
v := q(u) coeffs, u → [1/6480000000000; 1/6480000000000000000; 1/3600000000000000000000000]
r := polyroots(v)
r = [-277778 + 691661i; -277778 - 691661i]
ωmin := 0
ωmax := 2*sqrt((2.778*10^5)^2 + (6.917*10^5)^2) = 1490801
ω := 0, 10 .. 10^6
K(p) := (g6 + g7)*(C1*C2*g5*p^2 + g1*g2*g4)/(g4*(C1*C2*g7*p^2 + C1*g2*g7*p + g2*g3*g6 + g2*g3*g7))
K(ω) := (g6 + g7)*(g1*g2*g4 - C1*C2*ω^2*g5)/(g4*(g2*g3*g6 - C1*C2*g7*ω^2 + g2*g3*g7 + C1*g2*g7*ω*1i))
Km(ω) := |K(ω)|
ψk(ω) := arg(K(ω))
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